# OpenSim document version 40000
MarkerSet:
  Marker FHD: head (0.13 0.2385 0)
  Marker RHD: head (0.03 0.2285 0.086)
  Marker BHD: head (-0.07 0.2185 0)
  Marker LHD: head (0.03 0.2285 -0.086)
  Marker LBUL: torso (-0.1 0.1 -0.04)
  Marker LBLL: torso (-0.1 0.06 -0.04)
  Marker LBUR: torso (-0.1 0.1 0.04)
  Marker LBLR: torso (-0.1 0.06 0.04)
  Marker RAC: torso (0 0.42 0.16)
  Marker LAC: torso (0 0.42 -0.16)
  Marker RUAPA: humerus_r (0.035 -0.08 0.04)
  Marker RUAPP: humerus_r (-0.035 -0.08 0.04)
  Marker RUADP: humerus_r (-0.035 -0.15 0.04)
  Marker RUADA: humerus_r (0.035 -0.15 0.04)
  Marker RFAPA: radius_r (-0.03 -0.14 0.03)
  Marker RFAPP: radius_r (-0.04 -0.14 -0.01)
  Marker RFADP: radius_r (-0.04 -0.18 -0.01)
  Marker RFADA: radius_r (-0.03 -0.18 0.03)
  Marker RRAD: radius_r (-0.003 -0.22 0.045)
  Marker RULN: radius_r (-0.0132728 -0.226993 -0.02)
  Marker RHAND: hand_r (-0.02 -0.05 0)
  Marker LUAPA: humerus_l (0.035 -0.08 -0.04)
  Marker LUAPP: humerus_l (-0.035 -0.08 -0.04)
  Marker LUADP: humerus_l (-0.035 -0.15 -0.04)
  Marker LUADA: humerus_l (0.035 -0.15 -0.04)
  Marker LFAPA: radius_l (-0.03 -0.14 -0.03)
  Marker LFAPP: radius_l (-0.04 -0.14 0.01)
  Marker LFADP: radius_l (-0.04 -0.18 0.01)
  Marker LFADA: radius_l (-0.03 -0.18 -0.03)
  Marker LRAD: radius_l (-0.003 -0.22 -0.045)
  Marker LULN: radius_l (-0.0132699 -0.226993 0.02)
  Marker LHAND: hand_l (-0.02 -0.05 0)
  Marker PVUL: pelvis (-0.18 0.055 -0.045)
  Marker PVLL: pelvis (-0.18 -0.005 -0.045)
  Marker PVLR: pelvis (-0.18 -0.005 0.045)
  Marker PVUR: pelvis (-0.18 0.055 0.045)
  Marker RTHPA: femur_r (0.05 -0.11 0.07)
  Marker RTHPP: femur_r (-0.01 -0.11 0.07)
  Marker RTHDP: femur_r (-0.01 -0.18 0.07)
  Marker RTHDA: femur_r (0.05 -0.18 0.07)
  Marker RSHPA: tibia_r (0.035 -0.11 0.05)
  Marker RSHPP: tibia_r (-0.04 -0.11 0.05)
  Marker RSHDP: tibia_r (-0.04 -0.175 0.05)
  Marker RSHDA: tibia_r (0.035 -0.175 0.05)
  Marker RANL: tibia_r (-0.005 -0.38 0.05)
  Marker RHEE: calcn_r (-0.02 0.02 0)
  Marker RFTB: calcn_r (0.12 0.035 0.04)
  Marker RFTM: calcn_r (0.15 0.045 0.02)
  Marker RFTF: calcn_r (0.160029 0.0239144 0.05)
  Marker LTHPA: femur_l (0.05 -0.11 -0.07)
  Marker LTHPP: femur_l (-0.01 -0.11 -0.07)
  Marker LTHDP: femur_l (-0.01 -0.18 -0.07)
  Marker LTHDA: femur_l (0.05 -0.18 -0.07)
  Marker LSHPA: tibia_l (0.035 -0.11 -0.05)
  Marker LSHPP: tibia_l (-0.04 -0.11 -0.05)
  Marker LSHDP: tibia_l (-0.04 -0.175 -0.05)
  Marker LSHDA: tibia_l (0.035 -0.175 -0.05)
  Marker LANL: tibia_l (-0.005 -0.38 -0.05)
  Marker LHEE: calcn_l (-0.02 0.02 0)
  Marker LFTB: calcn_l (0.12 0.035 -0.04)
  Marker LFTM: calcn_l (0.15 0.045 -0.02)
  Marker LFTF: calcn_l (0.16 0.023 -0.05)
